// SBML level 2 version 1

model Model_generated_by_BIOCHAM()

  // Compartments:
  compartment compartmentOne = 1;

  // Species:
  species E2F in compartmentOne = 0.01;
  species Me in compartmentOne = 0.01;
  species Ma in compartmentOne = 0.01;
  species Mb in compartmentOne = 0.01;
  species Cdc20 in compartmentOne = 0.01;

  // Parameters:
  Cdc20tot = 5;
  E2Ftot = 3;
  GF = 1;
  Kda = 0.1;
  Kdb = 0.005;
  Kdd = 0.1;
  Kde = 0.1;
  K1cdc20 = 1;
  K2cdc20 = 1;
  K1e2f = 0.01;
  K2e2f = 0.01;
  Vda = 0.245;
  Vdb = 0.28;
  Vdd = 0.245;
  Vde = 0.35;
  vsa = 0.175;
  vsb = 0.21;
  vsd = 0.175;
  vse = 0.21;
  V1cdc20 = 0.21;
  V2cdc20 = 0.35;
  V1e2f = 0.805;
  V2e2f = 0.7;

  // Assignment rules:
  Md := Kdd*vsd*GF/(0.1 + GF)/(Vdd - vsd*GF/(0.1 + GF));

  // Reactions:
  R_1: => E2F; V1e2f*(E2Ftot - E2F)/(K1e2f + (E2Ftot - E2F))*(Md + Me);
  R_2: E2F + Ma => Ma; V2e2f/(K2e2f + E2F)*E2F*Ma;
  R_3: E2F => E2F + Me; vse*E2F;
  R_4: Ma + Me => Ma; Vde/(Kde + Me)*Ma*Me;
  R_5: E2F => E2F + Ma; vsa*E2F;
  R_6: Cdc20 + Ma => Cdc20; Vda/(Kda + Ma)*Cdc20*Ma;
  R_7: Ma => Ma + Mb; vsb*Ma;
  R_8: Cdc20 + Mb => Cdc20; Vdb/(Kdb + Mb)*Cdc20*Mb;
  R_9: Mb => Cdc20 + Mb; V1cdc20*Mb*(Cdc20tot - Cdc20)/(K1cdc20 + (Cdc20tot - Cdc20));
  R_10: Cdc20 => ; V2cdc20*Cdc20/(K2cdc20 + Cdc20);
end
